d_t := 102 mm
k := 125 mm
p := 8 bar = 0.8 MPa
D_N := 50 mm
d_3 := 72 mm
d_2 := 18 mm
D := 165 mm
d := D_N
d_4 := 102 mm
s := 2.9 mm
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# E360-as acél
# Az E360-as acélnak a folyáshatára R_eH := 355 MPa
# A biztonsági tényezőt n := 2-re választjuk
# Ekkor azt mondhatjuk, hogy a megengedhető legnagyobb hajlító feszültség:
σ_hajl := R_eH/n = 177.5 MPa
b_min := d_t/2*sqrt(3*p/σ_hajl*(1 - 2*d_t/(3*k))) = 4.0046 mm
# A csavarok húzószilárdsági ellenőrzése
# A csavarokra kétféle igénybevétel hat: egy (σ_N) normál, ami a feszítő erőből származik, illetve egy csavaró feszültség (τ_t) ami a lecsavarodást akadályozza meg.
# Az ébredő feszültséget a σ_N = F_V/A_e képlettel számolhatjuk.
A := d^2*π/4
F_cső := p*A = 1.5708 kN  # A vakkarimát nyomó csőerő a rögzítés révén húza a csavart
F_p := p*(d_t^2 - d^2)*π/4 = 4.96623 kN  # Az üzemi nyomásból származó erő a tömítés felületén hat
# A tömítésre jellemző értékek:
# A tömítés szélessége:b_t := (D - d_4)/2 = 31.5 mm
# A tömítéseffektív szélessége:b'_t := 1.1*b_t
# Valamint a tömítés anyagát figyelembe vevő tényező: n_t := 1.5
F_t := n_t*p*π*d_t*b'_t = 13.324 kN
F_ü := 1.2*(F_cső + F_p + F_t) = 23.8332 kN
# Mivel N := 4 csavarra méretezünk, így kiszámolhatjuk az előfeszítő erőt
F_V := F_ü/N = 5.95831 kN
d_e := (d_3 + d_2)/2 = 45 mm  # Ahol d_3 a magátmérő d_2a középátmérő d_e pedig az egyenértékű átmérő
A_e := d_e^2*π/4 = 1590.43 mm^2
σ_N := F_V/A_e = 3.74635 MPa  # Ahol σ_Na csavarban ébredő normál feszültség, F_V pedig az előfeszítés
# A csavarok csavarószilárdsági ellenőrzése
# A csavarkötés τ-igénybevétele a szilárdságtanból ismert képlet alapján: τ_t= M_t/I_p*r a keresztmetszetben kifelé haladva a feszültség folyamatosan nő, és a feszültségmaximum r := d_e/2 = 22.5 mm -nél van.
# A körkeresztmetszet poláris másodrendű nyomatéka I_p := d_e^4*π/32 = 402578 mm^4
# A csavarónyomaték két részből áll elő. Hat egy része a menetekben, ezt a menetemelkedés és a látszólagos súrlódási félkúpszög tangensével írhatjuk fel. Emellett hatnia kell egy savarónyomatéknak az anya alatt is, amely a becsavaráskor keletkezik, és egy anya alatti súrlódási együtthatóval írhatjuk fel.
# M_t= F_V*d_2/2*tan(α + ρ') + F_V*d_a/2*μ_A
# A menetemelkedés számítható a szabványban található adatokból. []
# P := 2 mm
α := atan(P/(d_2*π)) = 2.02558 deg
# Az anya alatti felfekvő felületet jellemzi a d_a, amelyet felírhatunk az átmérő és a laptávolság távolságából:
d_a := (d + s)/2 = 26.45 mm
# A súrlődási tényező μ := 0.5
# A menetemelkedés szöge metrikus menetre: β := 60°
ρ' := atan(μ/cos(β/2)) = 30 deg
M_t := F_V*d_2/2*tan(α + ρ') + F_V*d_a/2*μ_A  # error: This variable is undefined. Check that the label is set correctly.
s_pe := d_e^4*π/32 = 402578 mm^4
τ_t := M_T/s_pe*d_e/2  # error: This variable is undefined. Check that the label is set correctly.
# Link:
# www.zetamec.com/din-2632-pn10_eng.htm
# http://www.tribology-abc.com/calculators/metric-iso.htm
